# OpenSim document version 20303
Model tugOfWar_with_fatigue:
  length_units: meters
  force_units: N
  gravity: 0 -9.80665 0
  credits:
    Frank Anderson, Peter Loan, Ayman Habib, Ajay Seth, Michael Sherman
  BodySet:
    Body ground: mass=0 mass_center=(0 0 0) inertia_xx=1 inertia_yy=1 inertia_zz=1
        meshes=(ground.vtp anchor1.vtp anchor2.vtp)
    Body block: mass=20 mass_center=(0 0 0) inertia_xx=0.1333333 inertia_yy=0.1333333 inertia_zz=0.1333333
        meshes=block.vtp
      FreeJoint blockToGround: parent_body=ground location_in_parent=(0 0.05 0) location=(0 0.05 0)
        Coordinate blockToGround_xRotation: motion_type=rotational range=(-1.570796 1.570796)
        Coordinate blockToGround_yRotation: motion_type=rotational range=(-1.570796 1.570796)
        Coordinate blockToGround_zRotation: motion_type=rotational range=(-1.570796 1.570796)
        Coordinate blockToGround_xTranslation: motion_type=translational range=(-1 1)
        Coordinate blockToGround_yTranslation: motion_type=translational range=(-1 1)
        Coordinate blockToGround_zTranslation: motion_type=translational range=(-1 1)
  ForceSet:
    Millard2012EquilibriumMuscle fatigable: min_control=0 max_control=1 max_isometric_force=1000
        optimal_fiber_length=0.2 tendon_slack_length=0.1 pennation_angle_at_optimal=0 [radians]
        default_fiber_length=0.2 default_activation=0.01 fatigue_factor=0.3 recovery_factor=0.2
      PathPoint muscle1-point1: ground (0 0.05 -0.35)
      PathPoint muscle1-point2: block (0 0.05 -0.05)
      MuscleFirstOrderActivationDynamicModel:
        minimum_activation: 0.01
      ActiveForceLengthCurve
      ForceVelocityInverseCurve
      FiberForceLengthCurve
      TendonForceLengthCurve
    Millard2012EquilibriumMuscle original: min_control=0 max_control=1 max_isometric_force=1000
        optimal_fiber_length=0.2 tendon_slack_length=0.1 pennation_angle_at_optimal=0 default_fiber_length=0.2
        default_activation=0.01
      PathPoint muscle2-point1: ground (0 0.05 0.35)
      PathPoint muscle2-point2: block (0 0.05 0.05)
      MuscleFirstOrderActivationDynamicModel:
        minimum_activation: 0.01
      ActiveForceLengthCurve
      ForceVelocityInverseCurve
      FiberForceLengthCurve
      TendonForceLengthCurve
  ControllerSet Controllers:
    PrescribedController: actuator_list=(fatigable original)
      FunctionSet ControlFunctions: Constant(value=1) Constant(value=1)
