# OpenSim document version 30502
Model BuiltinGeometry:
  BodySet:
    Body ground: mass=0 [kg] mass_center=(0 0 0)
    Body block: mass=20 mass_center=(0 0 0) inertia=(0.1333333 0.1333333 0.1333333 0 0 0)
  FrameSet:
    FixedFrame LeftAnchor: translation=(0 0.05 0.35)
      connectors: Connector_RigidFrame_ parent_frame: connected_to_name=ground
    FixedFrame RightAnchor: translation=(0 0.05 -0.35)
      connectors: Connector_RigidFrame_ parent_frame: connected_to_name=ground
    FixedFrame CylAnchor: translation=(-0.2 0 0)
      connectors: Connector_RigidFrame_ parent_frame: connected_to_name=ground
    FixedFrame EllipsoidAnchor: translation=(-0.6 0.6 0)
      connectors: Connector_RigidFrame_ parent_frame: connected_to_name=ground
  JointSet:
    FreeJoint blockToGround: location_in_parent=(0 0.05 0) location_in_child=(0 0 0)
        orientation_in_child=(0 0 0) [radians]
      connectors:
        Connector_Body_ parent_body: connected_to_name=ground
        Connector_Body_ child_body: connected_to_name=block
      Coordinate blockToGround_xRotation: motion_type=rotational range=(-1.570796 1.570796)
      Coordinate blockToGround_yRotation: motion_type=rotational range=(-1.570796 1.570796)
      Coordinate blockToGround_zRotation: motion_type=rotational range=(-1.570796 1.570796)
      Coordinate blockToGround_xTranslation: motion_type=translational default_value=0.2 range=(-1 1)
      Coordinate blockToGround_yTranslation: motion_type=translational default_value=-0.00196133 range=(-1 1)
      Coordinate blockToGround_zTranslation: motion_type=translational range=(-1 1)
  ControllerSet:
    PrescribedController: actuator_list=(muscle1 muscle2)
      FunctionSet ControlFunctions: LinearFunction(coefficients=-0.333333 1) LinearFunction(coefficients=0.316667 0.05)
  ConstraintSet:
    ConstantDistanceConstraint: body_1=ground body_2=block location_body_1=(0 0.05 0) location_body_2=(0 0 0)
        constant_distance=0.2
  ForceSet:
    Thelen2003Muscle muscle1: min_control=0 max_control=1 max_isometric_force=1000 optimal_fiber_length=0.25
        tendon_slack_length=0.1 pennation_angle_at_optimal=0 [radians] default_activation=1 default_fiber_length=0.25
      PathPoint point1: ground (0 0.05 -0.35)
      PathPoint point2: block (0 0 -0.05)
    Thelen2003Muscle muscle2: min_control=0 max_control=1 max_isometric_force=1000 optimal_fiber_length=0.25
        tendon_slack_length=0.1 pennation_angle_at_optimal=0 default_activation=0.05 default_fiber_length=0.25
      PathPoint point1: ground (0 0.05 0.35)
      PathPoint point2: block (0 0 0.05)
    PrescribedForce: body=block
      FunctionSet forceFunctions: PiecewiseLinearFunction(x=0 3, y=0 588.399) Constant(value=0) Constant(value=0)
      FunctionSet pointFunctions: Constant(value=0) Constant(value=0) Constant(value=0)
  ContactGeometrySet:
    ContactHalfSpace floor: body_name=ground location=(0 0 0) orientation=(0 0 -1.570796)
  ModelDisplay:
    AppearanceMap:
      AppearanceList:
        GeometryAppearance: geometryID=/tugOfWar/ground/Brick
        GeometryAppearance: geometryID=/tugOfWar/ground/Brick
        GeometryAppearance: geometryID=/tugOfWar/ground/Cylinder
        GeometryAppearance: geometryID=/tugOfWar/ground/Ellipsoid
